// COMSOL Multiphysics 6.0.0.405 model "min_3D_wedge_pnas_E410_D665.mph"
// Min 2D
// Outline of the model tree
// Unit system: none

Parameters
  k_D = 0.065
  k_dD = 0.098
  k_dE = 0.126
  k_de = 0.34
  D_D = 60
  D_E = 60
  D_d = 0.013
  D_de = 0.013
  lambda = 6
  L = 500
  he = 50
  sh_uDD = 0
  sh_uD = 665
  sh_uE = 410
  sh_ud = 0
  sh_ude = 0
  pert = 0.0001

Functions
  rn1: Random | nargs = 4; type = normal; normalsigma = 2; seed = 10

Couplings
  intop1: Integration on domains 1
  intop2: Integration on boundaries 2

Probes
  var1: GlobalVariable "Global Variable Probe 1" | expr = intop1(uD+uDD)+intop2(ude+ud); unit = 1

Coordinate systems
  sys2: Boundary "Boundary System 2"

Geometry
  geom2 "Geometry 2" (3D, length unit m)
    wp1: WorkPlane | unite = on
      b1: BezierPolygon "Bézier Polygon 1"
        p = {{0, L, L, 0, 0}, {5, he, 0, 0, 5}}
        degree = {1, 1, 1, 1}
        w = {1, 1, 1, 1, 1, 1, 1, 1}
    ext1: Extrude | workplane = wp1; input = wp1; distance = L
    fin: Finalize "Form Union"

Physics
  g2: GeneralFormPDE on all domains
    dependent variable u2 = {uDD, uD, uE}
    ShapeProperty.order = 1
    ShapeProperty.boundaryFlux = 0
    ShapeProperty.boundaryFluxSmooth = 0
    ShapeProperty.valueType = real
    gfeq1: GeneralFormPDE (default)
      f = {-lambda*uDD, lambda*uDD, 0}
      Ga = 
        {-D_D*uDDx, -D_D*uDDy, -D_D*uDDz}
        {-D_D*uDx, -D_D*uDy, -D_D*uDz}
        {-D_E*uEx, -D_E*uEy, -D_E*uEz}
      da = 1
    zflx1: ZeroFluxBoundary "Zero Flux 1" (default)
    init1: init "Initial Values 1" (default)
      uDD = sh_uDD*(1+pert*rn1(x,y,z,1))
      uD = sh_uD*(1+pert*rn1(x,y,z,2))
      uE = sh_uE*(1+pert*rn1(x,y,z,3))
    flux1: FluxBoundary "Flux/Source 1" on boundaries 2 | g = {k_de*ude, -uD*(k_D+k_dD*ud), k_de*ude-k_dE*uE*ud}
  gb2: GeneralFormBoundaryPDE on boundaries 2
    dependent variable u = {ud, ude}
    ShapeProperty.order = 1
    ShapeProperty.valueType = real
    gfeq1: GeneralFormPDE (default)
      f = {uD*(k_D+k_dD*ud)-k_dE*uE*ud, k_dE*uE*ud-k_de*ude}
      Ga = {{-D_d*udTx, -D_d*udTy, -D_d*udTz}, {-D_de*udeTx, -D_de*udeTy, -D_de*udeTz}}
      da = {1, 0, 0, 1}
    init1: init "Initial Values 1" (default) | ud = sh_ud*(1+pert*rn1(x,y,z,4)); ude = sh_ude*(1+pert*rn1(x,y,z,5))
    zflx1: ZeroFluxBoundary "Zero Flux 1" on edges 1, 3, 5, 9

Mesh
  mesh2 "Mesh 2"
    size: MeshSizeDefault | hmax = 8; hmin = 0.001; custom = on
    ftri1: FreeTri "Free Triangular 1" on boundaries 1-6 | method = del
      size1: Size on boundaries 1, 3-6 | hmax = 30; custom = on
      size2: Size on boundaries 2 | hmax = 0.35; custom = on
    ftet1: FreeTet "Free Tetrahedral 1" on remaining entities | method = del

Studies
  std1 "Study 1"
    time: Transient "Time Dependent" | tlist = range(0,1,9000); usertol = on; rtol = 1e-5

Solver configurations
  sol1 "Solution 1" (study std1)
    v1: Variables "Dependent Variables 1"
    t1: Time "Time-Dependent Solver 1"
      tlist = range(0,1,9000)
      rtol = 1e-5
      atolglobalvaluemethod = manual
      atolglobal = 1e-5
      atolvaluemethod = {comp2_uD, manual, comp2_ud, manual, comp2_uDD, manual, comp2_ude, manual, comp2_uE, manual}
      initialstepbdf = 1e-7
      bwinitstepfrac = 1e-4
      fc1: FullyCoupled | maxiter = 8
      i1: Iterative | linsolver = fgmres; itrestart = 30; maxlinit = 5000
        mg1: Multigrid | gmglevels = 2

Datasets
  dset1: Solution | solution = sol1
  surf1: Surface on boundaries 2 | data = dset1; param = zx

Plots
  pg1: PlotGroup2D "2D Plot Group 1" | data = surf1
    surf1: Surface | expr = ud+ude